// COMSOL Multiphysics 6.0.0.318 model "ElectricField.mph"
// Outline of the model tree

Geometry
  geom1 "Geometry 1" (3D, length unit mm)
    blk1: Block | size = {77, 10, 80}
    blk2: Block | pos = {0, 10, 0}; size = {77, 10, 80}
    blk3: Block | pos = {0, 20, 0}; size = {77, 10, 80}
    fin: Finalize "Form Union"

Materials
  mat1: Common "BMN-35" on domains 1, 3
    def "Basic"
      thermalconductivity = 9.0[W/(m*K)]
      density = 7.55[g/cm^3]
      heatcapacity = 440[J/(kg*K)]
      electricconductivity = 1/1.50[uohm*m]
      relpermittivity = 1
    RemanentFluxDensity
      murec = 1.05
      normBr = Br(T)
      int1: Interpolation | funcname = Br; table = {{293.15, 1.220}, {353.15, 1.13}}; extrap = linear; fununit = T; argunit = K
  mat2: Common "Perfect vacuum" on domains 2
    def "Basic"
      density = 0
      relpermeability = 1
      relpermittivity = 1
      electricconductivity = 0

Physics
  es: Electrostatics on all domains
    dependent variable V
    ccn1: ChargeConservation (default)
    zc1: ZeroCharge (default)
    init1: init "Initial Values 1" (default)
    pot1: ElectricPotential on boundaries 1-4, 6, 14 | V0 = 0
    pot2: ElectricPotential on boundaries 9-13, 16 | V0 = -15

Mesh
  mesh1 "Mesh 1" (physics-controlled)

Studies
  std1 "Study 1"
    stat: Stationary

Solver configurations
  sol1 "Solution 1" (study std1)
    v1: Variables "Dependent Variables 1"
    s1: Stationary "Stationary Solver 1"
      fc1: FullyCoupled | linsolver = i1
      i1: Iterative | linsolver = cg
        mg1: Multigrid | prefun = amg; coarseningmethod = classic

Datasets
  dset1: Solution | solution = sol1

Plots
  pg1: PlotGroup3D "Electric Potential (es)" | data = dset1; arrayaxis = y
    mslc1: Multislice
      expr = V
      multiplanexmethod = coord
      xcoord = es.CPx
      multiplaneymethod = coord
      ycoord = es.CPy
      multiplanezmethod = coord
      zcoord = es.CPz
    strmsl1: StreamlineMultislice
      expr = {es.Ex, es.Ey, es.Ez}
      multiplanexmethod = coord
      xcoord = es.CPx
      multiplaneymethod = coord
      ycoord = es.CPy
      multiplanezmethod = coord
      zcoord = es.CPz
      udist = 0.02
      col1: Color "Color Expression 1" | expr = V
      filt1: Filter | expr = !isScalingSystemDomain
    arwv1: ArrowVolume | expr = {es.Ex, es.Ey, es.Ez}; xnumber = 10; ynumber = 10; znumber = 10
    vol1: Volume | expr = es.normE; descr = Electric field norm
  pg2: PlotGroup3D "Electric Field Norm (es)" | data = dset1
    mslc1: Multislice
      expr = es.normE
      multiplanexmethod = coord
      xcoord = es.CPx
      multiplaneymethod = coord
      ycoord = es.CPy
      multiplanezmethod = coord
      zcoord = es.CPz
    strmsl1: StreamlineMultislice
      expr = {es.Ex, es.Ey, es.Ez}
      multiplanexmethod = coord
      xcoord = es.CPx
      multiplaneymethod = coord
      ycoord = es.CPy
      multiplanezmethod = coord
      zcoord = es.CPz
      udist = 0.02
      col1: Color "Color Expression 1" | expr = es.normE
      filt1: Filter | expr = !isScalingSystemDomain

Exports
  data1: Data "EF"
    data = dset1
    expr = {es.Ex, es.Ey, es.Ez, es.normE}
    unit = {V/m, V/m, V/m, V/m}
    descr = {"Electric field, x component", "Electric field, y component", "Electric field, z component", Electric field norm}
    filename = C:\Users\bharatmishra\Desktop\Alma\EF.txt
    location = grid
    gridx3 = range(0,1.57142857143,77)
    gridy3 = range(10,0.204081632653,20)
    gridz3 = range(0,1.63265306122,80)