// COMSOL Multiphysics 6.0.0.318 model "MagneticField.mph"
// Outline of the model tree

Geometry
  geom1 "Geometry 1" (3D, length unit mm)
    blk1: Block | base = center; size = {77, 20, 150}
    sph1: Sphere | r = 170
    fin: Finalize "Form Union"

Materials
  mat1: Common "Material 1" on all domains
    def "Basic"
      relpermeability = 1

Physics
  mfnc: MagnetostaticsNoCurrents "Magnetic Fields, No Currents" on domains 2
    dependent variable Vm
    EquationForm.form = Automatic
    mfc1: MagneticFluxConservation (default) | ConstitutiveRelationBH = RelativePermeability
    mi1: MagneticInsulation (default)
    init1: init "Initial Values 1" (default)
    mfc2: MagneticFluxConservation "Magnet" on domains 2
      ConstitutiveRelationBH = Magnetization
      M = {0, 85000, 0}
      mur_mat = userdef
      mur = 1
      normB_mat = userdef
      normB = mu0_const*mfnc.normH
      Wpm_BHC_mat = userdef
      Wpm_BHC = (0.5*mfnc.normB)*mfnc.normH
      inStationaryStudy = TransientInitialization
      Hc_mat = from_mat
      Wpm_NPM_mat = from_mat
    mflx1: MagneticFluxDensity on boundaries 5-9, 14 | nB_type = B0; B0 = {0, 0.1, 0}

Mesh
  mesh1 "Mesh 1" (physics-controlled)

Studies
  std1 "Study 1"
    stat: Stationary

Solver configurations
  sol1 "Solution 1" (study std1)
    v1: Variables "Dependent Variables 1"
    s1: Stationary "Stationary Solver 1"
      fc1: FullyCoupled | linsolver = i1; dtech = const
      i1: Iterative | linsolver = cg
        mg1: Multigrid | prefun = amg; coarseningmethod = classic

Datasets
  dset1: Solution | solution = sol1

Plots
  pg1: PlotGroup3D "Magnetic Flux Density Norm (mfnc)" | data = dset1
    mslc1: Multislice
      expr = mfnc.normB
      xnumber = 0
      xcoord = mfnc.CPx
      ycoord = mfnc.CPy
      znumber = 0
      zcoord = mfnc.CPz
      tran1: Transparency
    strmsl1: StreamlineMultislice
      expr = {mfnc.Bx, mfnc.By, mfnc.Bz}
      multiplanexmethod = coord
      xcoord = mfnc.CPx
      multiplaneymethod = coord
      ycoord = mfnc.CPy
      multiplanezmethod = coord
      zcoord = mfnc.CPz
      udist = 0.02
      col1: Color "Color Expression 1" | expr = mfnc.normB
      filt1: Filter | expr = !isScalingSystemDomain
    arwv1: ArrowVolume | expr = {mfnc.Bx, mfnc.By, mfnc.Bz}; xnumber = 10; ynumber = 1; znumber = 10
  pg2: PlotGroup3D "Magnetic Scalar Potential (mfnc)" | data = dset1
    mslc1: Multislice | expr = Vm; xnumber = 0; xcoord = mfnc.CPx; ycoord = mfnc.CPy; znumber = 0; zcoord = mfnc.CPz
      tran1: Transparency
    strmsl1: StreamlineMultislice
      expr = {mfnc.Hx, mfnc.Hy, mfnc.Hz}
      multiplanexmethod = coord
      xcoord = mfnc.CPx
      multiplaneymethod = coord
      ycoord = mfnc.CPy
      multiplanezmethod = coord
      zcoord = mfnc.CPz
      udist = 0.02
      col1: Color "Color Expression 1" | expr = Vm
      filt1: Filter | expr = !isScalingSystemDomain
  pg3: PlotGroup3D "3D Plot Group 3" on domains 2 | data = dset1
    vol1: Volume | data = dset1; expr = mfnc.Bz; descr = Magnetic flux density norm

Exports
  data1: Data
    data = dset1
    expr = {mfnc.Bx, mfnc.By, mfnc.Bz, mfnc.normB}
    unit = {T, T, T, T}
    descr = {"Magnetic flux density, x component", "Magnetic flux density, y component", "Magnetic flux density, z component", Magnetic flux density norm}
    filename = C:\Users\bharatmishra\Desktop\Alma\test.txt
    location = grid
    gridx3 = range(-38.5,1.57142857143,38.5)
    gridy3 = range(-10,0.408163265306,10)
    gridz3 = range(-75,3.0612244898,75)